!! Areas
/prep7

ALLSEL
ASEL,U,AREA,,ALL

! PISO 1
! L1:
AL,35,25,37,28
AL,34,28,36,33
! L2:
AL,37,26,39,29
AL,36,29,38,32
! L3:
AL,39,27,41,30
CM,Laje12,AREA
ASEL,U,AREA,,ALL
! L4:
AL,41,42,46,43
AL,40,43,45,44
CM,Laje8,AREA
ASEL,U,AREA,,ALL

! PISO 2
! L1:
AL,57,47,59,50
AL,56,50,58,55
! L2:
AL,59,48,61,51
AL,58,51,60,54
! L3:
AL,61,49,63,52
CMSEL,A,Laje12
CM,Laje12,AREA
